f(x) := |x/2| - ((3*sqrt(33) - 7)/112)*x^2 - 3 + sqrt(1 - (||x| - 2| - 1)^2)
f_2(x) := 9*sqrt(|(|x| - 1)*(|x| - 0.75)|/((1 - |x|)*(|x| - 0.75))) - 8*|x|
f_3(x) := 3*|x| + 0.75*sqrt(|(|x| - 0.75)*(|x| - 0.5)|/((0.75 - |x|)*(|x| - 0.5)))
f_4(x) := 2.25*sqrt(|(x - 0.5)*(x + 0.5)|/((0.5 - x)*(0.5 + x)))
f_5(x) := (1.5 - 0.5*|x|)*sqrt(||x| - 1|/(|x| - 1)) - 6*sqrt(10)*sqrt(4 - (|x| - 1)^2)/14 + 6*sqrt(10)/7
f_6(x) := 3*sqrt(1 - x^2*sqrt(||x| - 3|/(|x| - 3))/49)
f_7(x) := -3*sqrt(1 - x^2*sqrt(||x| - 4|/(|x| - 4))/49)
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