# задача 1
w := 1
x := 1
y := 1
z := 1
v := 1
Given
3*x + 8*y - 9*z == 12
5*x - 9*y + 2*z == 34
8*x - 6*y + 5*z == 98
otvet := Find(x, y, z)
otvet = [11.4572; 3.91257; 5.96357]
# задача 2
Given
5*x + 6*y - 9*z + 2*v - 7*w == 90
3*x - 4*y + 5*z - 3*v + 4*w == 12
9*x + y + 3*z - 2*v + 9*w == 51
7*x + 2*y - 8*z + v + 10*w == 32
6*x + 5*y - 4*z + 3*v - 2*w == 87
otvet := Find(x, y, z, v, w)
otvet = [12.4545; -2.96337; 0.356049; 6.01021; -5.24167]
# задача 3
Given
x*sin(x) + cos(x) == 25
otvet := Find(x)
otvet = 44.5554
Given
11*x + 12*y + 31*z == 9
4*x + 52*y + 69*z == 8
7*x + 86*y + 93*z == 7
# 1 способ
ORIGIN := 1
A := [1, 12, 31; 4, 52, 69; 7, 86, 93]
B := [9; 8; 7]
x := A^-1*B
x = [7.6943; -1.01554; 0.435233]
# 2 способ
ORIGIN := 1
A := [1, 12, 31; 4, 52, 69; 7, 86, 93]
B := [9; 8; 7]
X := lsolve(A, B)
X = [7.6943; -1.01554; 0.435233]
# задача 4
ORIGIN := 1
A := [5, 6, -9, 2, -7; 3, -4, 5, -3, 4; 9, 1, 3, -2, 9; 7, 2, -8, 1, 10; 6, 5, -4, 3, -2]
B := [90; 12; 51; 32; 87]
X := lsolve(A, B)
X = [12.4545; -2.96337; 0.356049; 6.01021; -5.24167]
# задача 5
x := 2
root(x^2 + 2*x + 1, x) = -0.999985
polyroots([3; 2; 8]) = [-0.125 - 0.599479i; -0.125 + 0.599479i]
root(8*x^2 + 2*x + 3, x) = -0.125 - 0.599479i
# задача 6
polyroots([0; 2; 8; 6; 5]) = [-0.449565 - 1.06178i; -0.449565 + 1.06178i; -0.30087; 0]
polyroots([8; 9; 4; 8; 5]) = [-1.34082; -1; 0.370409 + 1.02767i; 0.370409 - 1.02767i]
polyroots([-3; 8; 0; 0; 4]) = [-1.36603; 0.366025; 0.5 + 1.11803i; 0.5 - 1.11803i]
# Задача 11
polyroots([1; 1; 1]) = [-0.5 + 0.866025i; -0.5 - 0.866025i]
1
Given
2
polyroots([6; 5; 2; 3]) = [-1; 0.166667 + 1.40436i; 0.166667 - 1.40436i]
3*x^3 + 2*x^2 + 5*x + 6 == 0
otvet := Find(x)  # error: Эта переменная не определена.
otvet =  # error: Эта переменная не определена.
3
