# задача 7
a
M := [0.3, 0.2, 6.6, -1.1; 4.5, -1.8, -0.3, 6.5; -7.3, 9.7, 10.9, -4.1; 8.1, -2.7, 8.7, 8.9]
v := [1; 0.1; 0.01; 1*10^-3]
lsolve(M, v) → [-3.93715859522; -2.97525734579; 0.745906020951; 1.95161880959]
б
M*[w; x; y; z] - v solve, w, x, y, z; float, 4 → [-3.937, -2.975, 0.7459, 1.952]
в
г
Given
3*x1 + 4*x2 + 4*x3 + 6*x4 + 8*x5 == 21
5*x1 + 7*x2 + 8*x3 - 7*x4 - 9*x5 == 34
9*x1 + 12*x2 + 9*x3 + 8*x4 + 4*x5 == 41
13*x1 + 3*x2 + 19*x3 + 18*x4 + 9*x5 == 141
23*x1 + 13*x2 + 9*x3 + 8*x4 + 19*x5 == 241
Find(x1, x2, x3, x4, x5) → [30965/2539; -58955/10156; 4366/2539; -15189/5078; 23741/10156]
д
Given
a1*x + b1*y + c1*z == d1
a2*x + b2*y + c2*z == d2
a3*x + b3*y + c3*z == d3
Find(x, y, z) → [
    (b1*c2*d3 - b1*c3*d2 - b2*c1*d3 + b2*c3*d1 + b3*c1*d2 - b3*c2*d1)/(a1*b2*c3 - a1*b3*c2 - a2*b1*c3 + a2*b3*c1 + a3*b1*c2 - a3*b2*c1);
    -(a1*c2*d3 - a1*c3*d2 - a2*c1*d3 + a2*c3*d1 + a3*c1*d2 - a3*c2*d1)/(a1*b2*c3 - a1*b3*c2 - a2*b1*c3 + a2*b3*c1 + a3*b1*c2 - a3*b2*c1);
    (a1*b2*d3 - a1*b3*d2 - a2*b1*d3 + a2*b3*d1 + a3*b1*d2 - a3*b2*d1)/(a1*b2*c3 - a1*b3*c2 - a2*b1*c3 + a2*b3*c1 + a3*b1*c2 - a3*b2*c1)
]
# Задача 9
x[1] := 1
x[2] := 1
x[3] := 1
x[4] := 1
Given
3*x1 + 4*x2 + 4*x3 + 6*x4 == 21
5*x1 + 7*x2 + 8*x3 - 7*x4 == 34
9*x1 + 12*x2 + 9*x3 + 8*x4 == 41
13*x1 + 3*x2 + 19*x3 + 18*x4 == 141
Find(x1, x2, x3, x4) → [6799/2807; -8606/2807; 16328/2807; 1277/2807]
# задача 10
1
чаво
3*X^4 + 5*X^3 + 7*X^2 + 9*X + 10 solve, X; float, 2 → [0.29 - 1.3i; -1.1 - 0.76i; 0.29 + 1.3i; -1.1 + 0.76i]
2
(a*l^2 + b*l + c) solve, l → [-(b/2 + sqrt(b^2 - 4*a*c)/2)/a; -(b/2 - sqrt(b^2 - 4*a*c)/2)/a]
3
Given
x^2 + y^2 == r^2
(x - α)^2 + y^2 == r^2
M(α, r) := Find(x, y) → [α/2, α/2; sqrt(4*r^2 - α^2)/2, -sqrt(4*r^2 - α^2)/2]
# Задача 11
polyroots([1; 1; 1]) = [-0.5 + 0.866025i; -0.5 - 0.866025i]
polyroots([6; 5; 2; 3]) = [-1; 0.166667 + 1.40436i; 0.166667 - 1.40436i]
Given
a*x^4 + b*x^2 + d == 0
Find(x) → [sqrt(-(b/2 + sqrt(b^2 - 4*a*d)/2)/a), -sqrt(-1/a*(1/2*b + 1/2*sqrt(b^2 - 4*a*d))), sqrt(-(b/2 - sqrt(b^2 - 4*a*d)/2)/a), -sqrt(-1/a*(1/2*b - 1/2*sqrt(b^2 - 4*a*d)))]
