# лаба 5 задания 1,2,3,4
x := 0, 0.5 .. 3
y(x) := 15*x^15 + 10*x^10 + x
d^2/dx^2(y(x)) → [0; 3.90014648438; 4050; 636117.462158; 26035200; 470759868.622; 5028022350]
y := integral(3*x + 10*x^2, x = 0 .. 4) = 237.333
y := integral(x^5 + 6*x^2, x = 0 .. 4) = 810.667
x := 2
d^3/dx^3(3*x + 10*x^2) = -1.52557e-11
d^2/dx^2(3*x + 10*x^2) = 20
y := integral(5*x^3 + 9*x^2, x = 4 .. 9) = 9876.25
