d/dx(4*x^3) → 12*x^2  # лаба 5 задание 5
d/dx(sin(x)) → cos(x)
d/dx(sin(x)*sqrt(x^2 + 8*x)) → cos(x)*sqrt(x^2 + 8*x) + sin(x)*(2*x + 8)/(2*sqrt(x^2 + 8*x))
d/dx(cos(x)^3*nthroot(x^5 + 6*x^3/(x + 7), 4)) → cos(x)^3*(18*x^2/(x + 7) - 6*x^3/(x + 7)^2 + 5*x^4)/(4*(6*x^3/(x + 7) + x^5)^(3/4)) - 3*cos(x)^2*sin(x)*(6*x^3/(x + 7) + x^5)^(1/4)
# задание 6
e^(2*x)
1 + 2*x + 2*x^2 + 4*x^3/3 + 2*x^4/3 + 4*x^5/15 + 4*x^6/45 + 8*x^7/315 + 2*x^8/315 + 4*x^9/2835
# задание 7
nthroot(x^2 + 8, 4)
8^(1/4) + 8^(1/4)*x^2/32 - 3*8^(1/4)*x^4/2048 + 7*8^(1/4)*x^6/65536 - 77*8^(1/4)*x^8/8388608
sin(2*x) series, x == 1 → sin(2) + 2*cos(2)*(x - 1) - 2*sin(2)*(x - 1)^2 - 4*cos(2)*(x - 1)^3/3 + 2*sin(2)*(x - 1)^4/3 + 4*cos(2)*(x - 1)^5/15
sin(2*x) series, x == 5 → sin(10) + 2*cos(10)*(x - 5) - 2*sin(10)*(x - 5)^2 - 4*cos(10)*(x - 5)^3/3 + 2*sin(10)*(x - 5)^4/3 + 4*cos(10)*(x - 5)^5/15
nthroot(x^3 + 3*x + 8, 4) series, x == 3 → 44^(1/4) + 15*44^(1/4)*(x - 3)/88 + 117*44^(1/4)*(x - 3)^2/15488 - 4271*44^(1/4)*(x - 3)^3/1362944 + 28233*44^(1/4)*(x - 3)^4/43614208 - 205173*44^(1/4)*(x - 3)^5/3838050304
